# OpenSim document version 40000
Model pendulum:
  gravity: 0 -9.81 0
  Ground
  BodySet:
    Body link_0: mass=2 [kg] mass_center=(0 0 0) inertia=(0.04197917 0.000625 0.04197917 0 0 0)
      Cylinder link_0_geom_1: radius=0.025 half_height=0.25
    Body link_1: mass=2 mass_center=(0 0 0) inertia=(0.04197917 0.000625 0.04197917 0 0 0)
      Cylinder link_1_geom_1: radius=0.025 half_height=0.25
  JointSet:
    WeldJoint base_link: socket_parent_frame=ground_offset socket_child_frame=link_0_offset
      PhysicalOffsetFrame ground_offset: socket_parent=/ground translation=(0 2 0) [meters]
      PhysicalOffsetFrame link_0_offset: socket_parent=/bodyset/link_0 translation=(0 0 0)
    PinJoint link_0_joint: socket_parent_frame=link_0_offset socket_child_frame=link_1_offset
      Coordinate link_0_joint_coord_0
      PhysicalOffsetFrame link_0_offset: socket_parent=/bodyset/link_0 translation=(0 -0.25 0)
      PhysicalOffsetFrame link_1_offset: socket_parent=/bodyset/link_1 translation=(0 0.25 0)
  ForceSet:
    Millard2012EquilibriumMuscle muscle_1: min_control=0.01 max_control=1 max_isometric_force=1500
        optimal_fiber_length=0.11 tendon_slack_length=0.13 minimum_activation=0.01
      PathPoint origin: link_0 (0.025 -0.15 0)
      PathPoint mid: link_0 (0.025 -0.25 0)
      PathPoint insertion: link_1 (0.025 0.1 0)
      ActiveForceLengthCurve: minimum_value=0
      ForceVelocityCurve: concentric_slope_at_vmax=0 concentric_slope_near_vmax=0.25 isometric_slope=5
          eccentric_slope_at_vmax=0 eccentric_slope_near_vmax=0.15 max_eccentric_velocity_force_multiplier=1.4
      FiberForceLengthCurve
      TendonForceLengthCurve
    Millard2012EquilibriumMuscle muscle_2: min_control=0.01 max_control=1 max_isometric_force=1500
        optimal_fiber_length=0.11 tendon_slack_length=0.13 minimum_activation=0.01
      PathPoint origin: link_0 (-0.025 -0.15 0)
      PathPoint mid: link_0 (-0.025 -0.25 0)
      PathPoint insertion: link_1 (-0.025 0.1 0)
      ActiveForceLengthCurve: minimum_value=0
      ForceVelocityCurve: concentric_slope_at_vmax=0 concentric_slope_near_vmax=0.25 isometric_slope=5
          eccentric_slope_at_vmax=0 eccentric_slope_near_vmax=0.15 max_eccentric_velocity_force_multiplier=1.4
      FiberForceLengthCurve
      TendonForceLengthCurve
